// COMSOL Multiphysics 6.2.0.290 model "FE-R1.0-Cub-3D-crack.mph"
// Outline of the model tree
// Unit system: none

Parameters
  Metre = 1e-9  // [m]
  Coulomb = 1e-19  // [C]
  Voltage = 1  // [V]
  Time = 1e-12  // [s]
  Joule = Coulomb * Voltage  // [J]
  Newton = Joule / Metre  // [N]
  Pola = Coulomb / Metre^2  // [C/m^2]
  E = Voltage / Metre  // [N/C]
  Large_num = 1e7  // 罚数
  error_FE = 1e-9  // 铁电部分的残差
  error_SE = 1e-9  // 半导体部分的残差
  eps0_ = 0.088542  // [C^2 / (m^2 * N)]
  u0 = 0.0  // 施加的位移
  V0 = 0.0  // 施加的电势
  f = 1e6  // 外加电场频率
  f_ = f*Time  // 外加电场频率归一化值
  T_Cycle_ = 1/f_  // 外加电场周期归一化值
  k_ = 4/T_Cycle_  // 外加电场三角波斜率归一化值
  factor = 100000  // 极化放大因子
  Strain0 = 0.0
  Gc = 2
  lc = 0.04

Functions
  rn1: Random "随机 1" | funcname = P10; nargs = 3; type = normal; normalsigma = 0.001; seed = 113013
  rn2: Random "随机 2" | funcname = P20; nargs = 3; type = normal; normalsigma = 0.001; seed = 113014
  rn3: Random "随机 3" | funcname = P30; nargs = 3; type = normal; uniformrange = 0.001; normalsigma = 0.001; seed = 113015
  pw1: Piecewise "分段 三角波"
    funcname = tri
    arg = t
    extrap = periodic
    pieces = 
      {0, T_Cycle_/4, k_*t}
      {T_Cycle_/4, 3*T_Cycle_/4, -k_*t + k_*T_Cycle_/2}
      {3*T_Cycle_/4, T_Cycle_, k_*t - k_*T_Cycle_}

Variables
  var1 "Var_Cubic_Landau_Order4" (disabled)
    Yita1 = 2*a1_*P1 + 4*ab11_*P1^3 + 2*ab12_*P1*(P2^2+P3^2) - 2*(q11_*Strain11 + q12_*(Strain22+Strain33))*P1 - q44_*(Strain13*P3+Strain12*P2) - E1  // 总极化微力1
    Yita2 = 2*a1_*P2 + 4*ab11_*P2^3 + 2*ab12_*P2*(P1^2+P3^2) - 2*(q11_*Strain22 + q12_*(Strain11+Strain33))*P2 - q44_*(Strain23*P3+Strain12*P1) - E2  // 总极化微力2
    Yita3 = 2*a1_*P3 + 4*ab11_*P3^3 + 2*ab12_*P3*(P1^2+P2^2) - 2*(q11_*Strain33 + q12_*(Strain11+Strain22))*P3 - q44_*(Strain23*P2+Strain13*P1) - E3  // 总极化微力3
  var2 "Var_Cubic_Landau_Order6"
    Yita1 = 2*a1_*P1 + 4*ab11_*P1^3 + 2*ab12_*P1*(P2^2+P3^2) + 6*a111_*P1^5 + a112_*(4*P1^3*(P2^2+P3^2) + 2*P1*(P2^4+P3^4)) + 2*a123_*P1*P2^2*P3^2 - 2*(q11_*Strain11 + q12_*(Strain22+Strain33))*P1 - q44_*(Strain13*P3+Strain12*P2) - E1  // 总极化微力1
    Yita2 = 2*a1_*P2 + 4*ab11_*P2^3 + 2*ab12_*P2*(P1^2+P3^2) + 6*a111_*P2^5 + a112_*(4*P2^3*(P1^2+P3^2) + 2*P2*(P1^4+P3^4)) + 2*a123_*P2*P1^2*P3^2 - 2*(q11_*Strain22 + q12_*(Strain11+Strain33))*P2 - q44_*(Strain23*P3+Strain12*P1) - E2  // 总极化微力2
    Yita3 = 2*a1_*P3 + 4*ab11_*P3^3 + 2*ab12_*P3*(P1^2+P2^2) + 6*a111_*P3^5 + a112_*(4*P3^3*(P1^2+P2^2) + 2*P3*(P1^4+P2^4)) + 2*a123_*P3*P1^2*P2^2 - 2*(q11_*Strain33 + q12_*(Strain11+Strain22))*P3 - q44_*(Strain23*P2+Strain13*P1) - E3  // 总极化微力3
  var3 "Var_Cubic_Landau_Order8" (disabled)
    Yita1 = 2*a1_*P1 + 4*ab11_*P1^3 + 2*ab12_*P1*(P2^2+P3^2) + 6*a111_*P1^5 + a112_*(4*P1^3*(P2^2+P3^2) + 2*P1*(P2^4+P3^4)) + 2*a123_*P1*P2^2*P3^2 + 8*a1111_*P1^7 + a1112_*(6*P1^5*(P2^2+P3^2) + 2*P1*(P2^6+P3^6)) + a1122_*4*P1^3*(P2^4+P3^4) + a1123_*(4*P1^3*P2^2*P3^2 + 2*P1*(P2^4*P3^2+P2^2*P3^4)) - 2*(q11_*Strain11 + q12_*(Strain22+Strain33))*P1 - q44_*(Strain13*P3+Strain12*P2) - E1  // 总极化微力1
    Yita2 = 2*a1_*P2 + 4*ab11_*P2^3 + 2*ab12_*P2*(P1^2+P3^2) + 6*a111_*P2^5 + a112_*(4*P2^3*(P1^2+P3^2) + 2*P2*(P1^4+P3^4)) + 2*a123_*P2*P1^2*P3^2 + 8*a1111_*P2^7 + a1112_*(6*P2^5*(P1^2+P3^2) + 2*P2*(P1^6+P3^6)) + a1122_*4*P2^3*(P1^4+P3^4) + a1123_*(4*P2^3*P1^2*P3^2 + 2*P2*(P1^4*P3^2+P1^2*P3^4)) - 2*(q11_*Strain22 + q12_*(Strain11+Strain33))*P2 - q44_*(Strain23*P3+Strain12*P1) - E2  // 总极化微力2
    Yita3 = 2*a1_*P3 + 4*ab11_*P3^3 + 2*ab12_*P3*(P1^2+P2^2) + 6*a111_*P3^5 + a112_*(4*P3^3*(P1^2+P2^2) + 2*P3*(P1^4+P2^4)) + 2*a123_*P3*P1^2*P2^2 + 8*a1111_*P3^7 + a1112_*(6*P3^5*(P1^2+P2^2) + 2*P3*(P1^6+P2^6)) + a1122_*4*P3^3*(P1^4+P2^4) + a1123_*(4*P3^3*P1^2*P2^2 + 2*P3*(P1^4*P2^2+P1^2*P2^4)) - 2*(q11_*Strain33 + q12_*(Strain11+Strain22))*P3 - q44_*(Strain23*P2+Strain13*P1) - E3  // 总极化微力3
  var4 "Var_Cubic_Elastic"
    Strain11 = u1x  // 总应变11 [1]
    Strain22 = u2y  // 总应变22 [1]
    Strain33 = u3z  // 总应变33 [1]
    Strain23 = u2z + u3y  // 总应变23（工程） [1]
    Strain13 = u1z + u3x  // 总应变13（工程） [1]
    Strain12 = u1y + u2x  // 总应变12（工程） [1]
    Sigma11 = c11_*Strain11 + c12_*(Strain22+Strain33) - q11_*P1^2 - q12_*(P2^2+P3^2)  // 弹性应力11
    Sigma22 = c11_*Strain22 + c12_*(Strain11+Strain33) - q11_*P2^2 - q12_*(P1^2+P3^2)  // 弹性应力22
    Sigma33 = c11_*Strain33 + c12_*(Strain11+Strain22) - q11_*P3^2 - q12_*(P1^2+P2^2)  // 弹性应力33
    Sigma23 = c44_*Strain23 - q44_*P2*P3  // 弹性应力23
    Sigma13 = c44_*Strain13 - q44_*P1*P3  // 弹性应力13
    Sigma12 = c44_*Strain12 - q44_*P1*P2  // 弹性应力12
  var5 "Var_Cubic_Electric"
    E1 = -Vx  // 总电场强度1
    E2 = -Vy  // 总电场强度2
    E3 = -Vz  // 总电场强度3
    D1 = eps33_*E1 + P1  // 总电位移1
    D2 = eps33_*E2 + P2  // 总电位移2
    D3 = eps33_*E3 + P3  // 总电位移3
  var6 "Var_Cubic_PolaGrad"
    Xi11 = P1x  // 自发极化梯度11
    Xi22 = P2y  // 自发极化梯度22
    Xi33 = P3z  // 自发极化梯度33
    Xi12 = P1y  // 自发极化梯度12
    Xi21 = P2x  // 自发极化梯度21
    Xi13 = P1z  // 自发极化梯度13
    Xi31 = P3x  // 自发极化梯度31
    Xi23 = P2z  // 自发极化梯度23
    Xi32 = P3y  // 自发极化梯度32
    Lambda11 = g11_*Xi11 + g12_*(Xi22+Xi33)  // 极化梯度微力11
    Lambda22 = g11_*Xi22 + g12_*(Xi11+Xi33)  // 极化梯度微力22
    Lambda33 = g11_*Xi33 + g12_*(Xi11+Xi22)  // 极化梯度微力33
    Lambda12 = g44_*Xi12  // 极化梯度微力12
    Lambda21 = g44_*Xi21  // 极化梯度微力21
    Lambda13 = g44_*Xi13  // 极化梯度微力13
    Lambda31 = g44_*Xi31  // 极化梯度微力31
    Lambda23 = g44_*Xi23  // 极化梯度微力23
    Lambda32 = g44_*Xi32  // 极化梯度微力32
  var7 "Energy_Cubic_Landau_Order4" (disabled)
    F_Landau_ = a1_*(P1^2+P2^2+P3^2) + a11_*(P1^4+P2^4+P3^4) + a12_*(P1^2*P2^2+P1^2*P3^2+P2^2*P3^2)  // Landau能密度
  var8 "Energy_Cubic_Landau_Order6"
    F_Landau_ = a1_*(P1^2+P2^2+P3^2) + a11_*(P1^4+P2^4+P3^4) + a12_*(P1^2*P2^2+P1^2*P3^2+P2^2*P3^2) + a111_*(P1^6+P2^6+P3^6) + a112_*(P1^2*(P2^4+P3^4)+P2^2*(P1^4+P3^4)+P3^2*(P1^4+P2^4)) + a123_*P1^2*P2^2*P3^2  // Landau能密度
  var9 "Energy_Cubic_Landau_Order8" (disabled)
    F_Landau_ = a1_*(P1^2+P2^2+P3^2) + a11_*(P1^4+P2^4+P3^4) + a12_*(P1^2*P2^2+P1^2*P3^2+P2^2*P3^2) + a111_*(P1^6+P2^6+P3^6) + a112_*(P1^2*(P2^4+P3^4)+P2^2*(P1^4+P3^4)+P3^2*(P1^4+P2^4)) + a123_*P1^2*P2^2*P3^2 + a1111_*(P1^8+P2^8+P3^8) + a1112_*(P1^6*(P2^2+P3^2)+P2^6*(P1^2+P3^2)+P3^6*(P1^2+P2^2)) + a1122_*(P1^4*P2^4+P1^4*P3^4+P2^4*P3^4) + a1123_*(P1^4*P2^2*P3^2+P2^4*P1^2*P3^2+P3^4*P1^2*P2^2)  // Landau能密度
  var10 "Elastic"
    Strain11_e = Strain11 - Q11_*P1^2 - Q12_*(P2^2+P3^2)  // 弹性应变11 [1]
    Strain22_e = Strain22 - Q11_*P2^2 - Q12_*(P1^2+P3^2)  // 弹性应变22 [1]
    Strain33_e = Strain33 - Q11_*P3^2 - Q12_*(P1^2+P2^2)  // 弹性应变33 [1]
    Strain23_e = Strain23 - Q44_*P2*P3  // 弹性应变23（工程） [1]
    Strain13_e = Strain13 - Q44_*P1*P3  // 弹性应变13（工程） [1]
    Strain12_e = Strain12 - Q44_*P1*P2  // 弹性应变12（工程） [1]
    F_Elastic_ = 0.5*(Strain11_e*Sigma11 + Strain22_e*Sigma22 + Strain33_e*Sigma33 + Strain23_e*Sigma23 + Strain13_e*Sigma13 + Strain12_e*Sigma12)  // 弹性能密度
  var11 "Electric"
    F_Electric_ = -0.5*eps33_*(E1^2+E2^2+E3^2) - E1*P1 - E2*P2 - E3*P3  // 电场能密度
  var12 "GradPola"
    F_GradPola_ = 0.5*g11_*(Xi11^2 + Xi22^2 + Xi33^2) + 0.5*g44_*(Xi23^2 + Xi32^2 + Xi13^2 + Xi31^2 + Xi12^2 + Xi21^2)  // 极化梯度能密度
    F_eP_ = -(q11_*Strain11+q12_*Strain22+q12*Strain33)*P1^2-(q11_*Strain22+q12_*Strain11+q12*Strain33)*P2^2-(q11_*Strain33+q12_*Strain11+q12*Strain22)*P3^2-2*q44_*(Strain12*P1*P2+Strain23*P2*P3+Strain13*P1*P3)  // 应变极化耦合能
    F_tot_ = F_Elastic_+F_GradPola_+F_eP_
  var13 "PTO_Norm"
    T = 298  // 绝对温度 [K]
    a1_ = (T-752) * 3.8e-5  // [m^2 * N / C^2]
    a11_ = -7.3E-5  // [m^6 * N / C^4]
    a12_ = 7.5E-4  // [m^6 * N / C^4]
    ab11_ = 4.2286E-4  // [m^6 * N / C^4]
    ab12_ = 7.3541E-4  // [m^6 * N / C^4]
    a111_ = 2.6e-6  // [m^10 * N / C^6]
    a112_ = 6.1e-6  // [m^10 * N / C^6]
    a123_ = -3.7E-5  // [m^10 * N / C^6]
    eps33_ = 66 * eps0_  // [C^2 / (m^2 * N)]
    c11_ = 1746  // [N / m^2]
    c12_ = 793.7  // [N / m^2]
    c44_ = 1111  // [N / m^2]
    q11_ = 1.1412  // [m^2 * N / C^2]
    q12_ = 0.046071  // [m^2 * N / C^2]
    q44_ = 0.74993  // [m^2 * N / C^2]
    Q11_ = 8.9E-4  // [m^4 / C^2]
    Q12_ = -2.6E-4  // [m^4 / C^2]
    Q44_ = 6.75E-4  // [m^4 / C^2]
    G110_ = 0.0173  // [m^4 * N / C^2]
    g11_ = 0.6*G110_  // [m^4 * N / C^2]
    g12_ = 0  // [m^4 * N / C^2]
    g44_ = 0.6*G110_  // [m^4 * N / C^2]
    L_ = 0.2  // [C^2 / (m^2 * N *s)]
    Ec_ = 1.6034e8 / E  // [V / m]
    P0_ = 0.757 / Pola  // 298K下的自发极化强度 [C/m^2]
    Gc = Gc_/((G110_/abs(a1_))^0.5*(abs(a1_)*P0_^2))
    Gc_ = 2
  var14 "PZT_Norm(x=0.8)" (disabled)
    T = 298  // 绝对温度 [K]
    a1_ = (T-729.5302) * 3.4393E-5  // [m^2 * N / C^2]
    a11_ = -3.0501E-5  // [m^6 * N / C^4]
    a12_ = 6.32E-4  // [m^6 * N / C^4]
    ab11_ = 3.7664E-4  // [m^6 * N / C^4]
    ab12_ = 5.9368E-4  // [m^6 * N / C^4]
    a111_ = 2.475E-6  // [m^10 * N / C^6]
    a112_ = 9.6843E-6  // [m^10 * N / C^6]
    a123_ = -4.9012E-5  // [m^10 * N / C^6]
    eps33_ = 200 * eps0_  // [C^2 / (m^2 * N)]
    c11_ = 1746  // [N / m^2]
    c12_ = 793.7  // [N / m^2]
    c44_ = 1111  // [N / m^2]
    q11_ = 1.0586  // [m^2 * N / C^2]
    q12_ = 0.10401  // [m^2 * N / C^2]
    q44_ = 0.44583  // [m^2 * N / C^2]
    Q11_ = 8.14E-4  // [m^4 / C^2]
    Q12_ = -2.23E-4  // [m^4 / C^2]
    Q44_ = 6.42E-4  // [m^4 / C^2]
    G110_ = 0.014842  // [m^4 * N / C^2]
    g11_ = 1.6*G110_  // [m^4 * N / C^2]
    g12_ = 0  // [m^4 * N / C^2]
    g44_ = 1.6*G110_  // [m^4 * N / C^2]
    L_ = 0.2  // [C^2 / (m^2 * N *s)]
    Ec_ = 1.18163e8 / E  // [V / m]
    P0_ = 0.700035 / Pola  // 298K下的自发极化强度 [C/m^2]
  var15 "BTO_Norm" (disabled)
    T = 298  // 绝对温度 [K]
    a1_ = (T-388) * 4.124e-5  // [m^2 * N / C^2]
    a11_ = -2.097E-4  // [m^6 * N / C^4]
    a12_ = 7.974E-4  // [m^6 * N / C^4]
    ab11_ = 3.4199E-4  // [m^6 * N / C^4]
    ab12_ = 6.4077E-4  // [m^6 * N / C^4]
    a111_ = 1.294E-5  // [m^10 * N / C^6]
    a112_ = -1.95E-5  // [m^10 * N / C^6]
    a123_ = -2.5E-5  // [m^10 * N / C^6]
    a1111_ = 3.863E-6  // [m^14 * N / C^8]
    a1112_ = 2.529E-6  // [m^14 * N / C^8]
    a1122_ = 1.637E-6  // [m^14 * N / C^8]
    a1123_ = 1.367E-6  // [m^14 * N / C^8]
    eps33_ = 166 * eps0_  // [C^2 / (m^2 * N)]
    c11_ = 1780  // [N / m^2]
    c12_ = 964  // [N / m^2]
    c44_ = 1220  // [N / m^2]
    q11_ = 1.1245  // [m^2 * N / C^2]
    q12_ = 0.03104  // [m^2 * N / C^2]
    q44_ = 0.7076  // [m^2 * N / C^2]
    Q11_ = 0.001  // [m^4 / C^2]
    Q12_ = -3.4E-4  // [m^4 / C^2]
    Q44_ = 5.8E-4  // [m^4 / C^2]
    G110_ = 0.0037116  // [m^4 * N / C^2]
    g11_ = 1.6*G110_  // [m^4 * N / C^2]
    g12_ = 0  // [m^4 * N / C^2]
    g44_ = 1.6*G110_  // [m^4 * N / C^2]
    L_ = 0.2  // [C^2 / (m^2 * N *s)]
    Ec_ = 1.5196e7 / E  // [V / m]
    P0_ = 0.26 / Pola  // 298K下的自发极化强度 [C/m^2]
  var16 "STO_Norm" (disabled)
    T = 298  // 绝对温度 [K]
    a1_ = (coth(54/T)-1.056182562)*4.05e-3  // [m^2 * N / C^2]
    a11_ = 0.0016963  // [m^6 * N / C^4]
    a12_ = 0.0039176  // [m^6 * N / C^4]
    ab11_ = 0.0019959  // [m^6 * N / C^4]
    ab12_ = 0.0037375  // [m^6 * N / C^4]
    eps33_ = 10 * eps0_  // [C^2 / (m^2 * N)]
    c11_ = 3360  // [N / m^2]
    c12_ = 1070  // [N / m^2]
    c44_ = 1270  // [N / m^2]
    q11_ = 1.2466  // [m^2 * N / C^2]
    q12_ = -0.10906  // [m^2 * N / C^2]
    q44_ = 0.24308  // [m^2 * N / C^2]
    Q11_ = 4.57E-4  // [m^4 / C^2]
    Q12_ = -1.35E-4  // [m^4 / C^2]
    Q44_ = 1.914E-4  // [m^4 / C^2]
    G110_ = 0.0183166  // [m^4 * N / C^2]
    g11_ = 0.4*G110_  // [m^4 * N / C^2]
    g12_ = 0  // [m^4 * N / C^2]
    g44_ = 0.4*G110_  // [m^4 * N / C^2]
    L_ = 0.2  // [C^2 / (m^2 * N *s)]
  var17 "BFO_Norm" (disabled)
    T = 298  // 绝对温度 [K]
    a1_ = 9E-5 * (800*coth(800/T)-1300)  // [m^2 * N / C^2]
    a11_ = -0.00135  // [m^6 * N / C^4]
    a12_ = 5E-4  // [m^6 * N / C^4]
    ab11_ = -0.0012425  // [m^6 * N / C^4]
    ab12_ = 4.0608E-4  // [m^6 * N / C^4]
    a111_ = 1.12E-4  // [m^10 * N / C^6]
    a112_ = -3E-5  // [m^10 * N / C^6]
    a123_ = -6E-5  // [m^10 * N / C^6]
    eps33_ = 50 * eps0_  // [C^2 / (m^2 * N)]
    c11_ = 3020  // [N / m^2]
    c12_ = 1620  // [N / m^2]
    c44_ = 680  // [N / m^2]
    q11_ = 0.448  // [m^2 * N / C^2]
    q12_ = -0.224  // [m^2 * N / C^2]
    q44_ = 0.136  // [m^2 * N / C^2]
    Q11_ = 3.2E-4  // [m^4 / C^2]
    Q12_ = -1.6E-4  // [m^4 / C^2]
    Q44_ = 2E-4  // [m^4 / C^2]
    G110_ = 0.044326  // [m^4 * N / C^2]
    g11_ = 0.6*G110_  // [m^4 * N / C^2]
    g12_ = 0  // [m^4 * N / C^2]
    g44_ = 0.6*G110_  // [m^4 * N / C^2]
    L_ = 0.2  // [C^2 / (m^2 * N *s)]
    Ec_ = 2.51313e8 / E  // [V / m]
    P0_ = 0.40232 / Pola  // 298K下的自发极化强度 [C/m^2]

Selections
  sel1: Explicit "Point_x" on points 1, 2, 7, 8
  sel2: Explicit "Point_y" on points 1, 2, 13, 14
  sel3: Explicit "Point_z" on points 1, 7, 13, 15
  sel4: Explicit "Periodic_X" on boundaries 1, 6, 10
  sel5: Explicit "Periodic_Y" on boundaries 2, 8
  sel6: Explicit "Periodic_Z" on boundaries 3, 4

Probes
  dom1: Domain "Euler_FE" on all domains
    probename = delta_d_FE
    expr = sqrt(u1t^2 + u2t^2 + u3t^2 + Vt^2 + P1t^2 + P2t^2 + P3t^2)
    unit = 1
    table = tbl1

Common definitions
  state1: StateVariables "状态变量 1" on all domains
    state = E_max
    initialValue = 0
    updateExpression = max(E_max,F_tot_)
    order = 2

Geometry
  geom1 "几何 1" (3D, length unit m)
    blk1: Block "长方体 1" | size = {4, 4, 0.4}
    blk2: Block "长方体 2" | pos = {0, 2, 0}; size = {2, 0.05, 0.4}
    dif1: Difference "差集 1" | input = blk1; input2 = blk2
    fin: Finalize "形成联合体"

Physics
  Disp: WeakFormPDE "Displacement" on all domains
    dependent variable Disp = {u1, u2, u3}
    Units.SourceTermQuantity = dimensionless
    wfeq1: WeakFormPDE "弱形式偏微分方程 1" (default)
      weak = {-Sigma11*test(u1x) - Sigma12*test(u1y) - Sigma13*test(u1z), -Sigma22*test(u2y) - Sigma12*test(u2x) - Sigma23*test(u2z), -Sigma33*test(u3z) - Sigma13*test(u3x) - Sigma23*test(u3y)}
    zflx1: ZeroFluxBoundary "零通量 1" (default)
    init1: init "初始值 1" (default)
    constr1: PointwiseConstraint "逐点约束 1" (disabled) on selection sel1
      constraintExpression = u1
      constraintMethod = nodal
    constr2: PointwiseConstraint "逐点约束 2" (disabled) on selection sel2
      constraintExpression = u2
      constraintMethod = nodal
    constr3: PointwiseConstraint "逐点约束 3" (disabled) on selection sel3
      constraintExpression = u3
      constraintMethod = nodal
    constr4: PointwiseConstraint "逐点约束 4" (disabled) on boundaries 1, 6
      constraintExpression = u1
      constraintMethod = nodal
    constr5: PointwiseConstraint "逐点约束 5" (disabled) on boundaries 2 | constraintExpression = u2; constraintMethod = nodal
    constr6: PointwiseConstraint "逐点约束 6" (disabled) on boundaries 3 | constraintExpression = u3; constraintMethod = nodal
    pc1: PeriodicCondition "周期性条件 X" (disabled) on selection sel4 | destinationDomains: boundaries 10
    pc2: PeriodicCondition "周期性条件 Y" (disabled) on selection sel5 | destinationDomains: boundaries 8
    pc3: PeriodicCondition "周期性条件 Z" (disabled) on selection sel6 | destinationDomains: boundaries 4
    dir1: DirichletBoundary "狄利克雷边界条件 1" on boundaries 2 | r = {0, 0, 0}; useDirichletCondition = {1, 1, 0}
    dir2: DirichletBoundary "狄利克雷边界条件 2" on boundaries 8 | r = {0, t, 0}; useDirichletCondition = {1, 1, 0}
  Elec: WeakFormPDE "Electric" on all domains
    dependent variable V
    Units.SourceTermQuantity = dimensionless
    wfeq1: WeakFormPDE "弱形式偏微分方程 1" (default) | weak = -D1*test(Vx) - D2*test(Vy) - D3*test(Vz)
    zflx1: ZeroFluxBoundary "零通量 1" (default)
    init1: init "初始值 1" (default)
    constr1: PointwiseConstraint "逐点约束 1" (disabled) on points 1 | constraintExpression = V; constraintMethod = nodal
    constr2: PointwiseConstraint "逐点约束 2" (disabled) on boundaries 1, 6, 10
      constraintExpression = V
      constraintMethod = nodal
    constr3: PointwiseConstraint "逐点约束 3" (disabled) on boundaries 2, 8
      constraintExpression = V
      constraintMethod = nodal
    constr4: PointwiseConstraint "逐点约束 4" (disabled) on boundaries 3, 4
      constraintExpression = V
      constraintMethod = nodal
    pc1: PeriodicCondition "周期性条件 X" (disabled) on selection sel4 | destinationDomains: boundaries 10
    pc2: PeriodicCondition "周期性条件 Y" (disabled) on selection sel5 | destinationDomains: boundaries 8
    pc3: PeriodicCondition "周期性条件 Z" (disabled) on selection sel6 | destinationDomains: boundaries 4
    dir1: DirichletBoundary "狄利克雷边界条件 1" on boundaries 10 | r = 0
    dir2: DirichletBoundary "狄利克雷边界条件 2" on boundaries 1, 6 | r = -10
  Pola: WeakFormPDE "Polarization" on all domains
    dependent variable Pola = {P1, P2, P3}
    Units.SourceTermQuantity = dimensionless
    wfeq1: WeakFormPDE "弱形式偏微分方程 1" (default)
      weak = {-1/L_*P1t*test(P1) - Yita1*test(P1) - Lambda11*test(P1x) - Lambda12*test(P1y) - Lambda13*test(P1z), -1/L_*P2t*test(P2) - Yita2*test(P2) - Lambda22*test(P2y) - Lambda21*test(P2x) - Lambda23*test(P2z), -1/L_*P3t*test(P3) - Yita3*test(P3) - Lambda33*test(P3z) - Lambda31*test(P3x) - Lambda32*test(P3y)}
    zflx1: ZeroFluxBoundary "零通量 1" (default)
    init1: init "初始值 1" (default) | P1 = P10(x,y,z); P2 = P20(x,y,z); P3 = P30(x,y,z)
    init2: init "初始值 2" (disabled) on all domains | P1 = 7
    pc1: PeriodicCondition "周期性条件 X" (disabled) on selection sel4 | destinationDomains: boundaries 10
    pc2: PeriodicCondition "周期性条件 Y" (disabled) on selection sel5 | destinationDomains: boundaries 8
    pc3: PeriodicCondition "周期性条件 Z" (disabled) on selection sel6 | destinationDomains: boundaries 4
  c: WeakFormPDE "crack" on all domains
    dependent variable s
    EquationForm.form = Automatic
    Units.CustomSourceTermUnit = 1
    wfeq1: WeakFormPDE "弱形式偏微分方程 1" (default)
      weak = -st*test(s)-1/15*(Gc*(1/lc*s*test(s)+lc*(sx*test(sx)+sy*test(sy)+sz*test(sz)))-2*(1-s)*E_max*test(s))
    zflx1: ZeroFluxBoundary "零通量 1" (default)
    init1: init "初始值 1" (default)

Mesh
  mesh1 "网格 1"
    size: MeshSizeDefault "大小" | hmin = 0.18; custom = on
    map1: Map "映射 1" on boundaries 4
    swe1: Sweep "扫掠 1" on remaining entities

Studies
  std1 "Nanodot"
    time: Transient "瞬态"
      tlist = 0,1e9
      usertol = on
      rtol = 1e-5
      disabledphysics = {Disp/constr4, Disp/constr5, Disp/constr6, Disp/pc1, Disp/pc2, Disp/pc3, Elec/constr2, Elec/constr3, Elec/constr4, Elec/pc1, Elec/pc2, Elec/pc3, Pola/pc1, Pola/pc2, Pola/pc3, Pola/init2}
  std2 "Bulk"
    time: Transient "瞬态"
      tlist = 0,1e9
      usertol = on
      rtol = 1e-5
      disabledphysics = {Disp/constr4, Disp/constr5, Disp/constr6, Elec/constr2, Elec/constr3, Elec/constr4, Pola/init2}
  std3 "ElecApplied"
    time: Transient "瞬态"
      tlist = 0,2*T_Cycle_
      usertol = on
      rtol = 1e-5
      disabledphysics = {Disp/constr4, Disp/constr5, Disp/constr6, Disp/pc1, Disp/pc2, Disp/pc3, Elec/constr1, Elec/constr3, Elec/constr4, Elec/pc2, Elec/pc3, Pola/pc1, Pola/pc2, Pola/pc3, Elec/pc1}

Solver configurations
  sol1 "解 1" (study std1)
    v1: Variables "因变量 1" | scalemethod = none
    t1: Time "瞬态求解器 1" | tlist = 0,1e9; tout = tsteps; tstepsstore = 20; rtol = 1e-5; initialstepbdf = 1e-5
      dDef: Direct "直接" | linsolver = pardiso
      fc1: FullyCoupled "全耦合 1" | maxiter = 10
      st1: StopCondition "停止条件 1"
        stopcondterminateon = true
        stopconddesc = 停止表达式 1
        stopcondarr = comp1.delta_d_FE<error_FE
  sol2 "解 2" (study std2)
    // same settings as sol1
  sol3 "解 3" (study std3)
    v1: Variables "因变量 1" | scalemethod = none
    t1: Time "瞬态求解器 1" | tlist = 0,2*T_Cycle_; tout = tsteps; tstepsstore = 20; rtol = 1e-5; initialstepbdf = 1e-5
      dDef: Direct "直接" | linsolver = pardiso
      fc1: FullyCoupled "全耦合 1" | maxiter = 10
      st1: StopCondition "停止条件 1"
        stopcondterminateon = true
        stopconddesc = 停止表达式 1
        stopcondarr = comp1.delta_d_FE<error_FE

Datasets
  dset1: Solution | solution = sol1
  dset2: Solution | solution = sol2
  dset3: Solution | solution = sol3
  dset4: Solution "探针解 4" | solution = sol3
  avh1: Average "Euler_FE" on domains 1 | data = dset4

Derived values
  pev1: EvalPoint "Euler_FE"
    data = avh1
    table = tbl1
    expr = sqrt(u1t^2 + u2t^2 + u3t^2 + Vt^2 + P1t^2 + P2t^2 + P3t^2)

Tables
  tbl1: Table "探针表 1"
    时间 (s) | sqrt(u1t^2 + u2t^2 + u3t^2 + Vt^2 + P1t^2 + P2t^2 + P3t^2), Euler_FE
    0 | 0.5
    1.002e-05 | 0.5
    2.002e-05 | 0.5
    4.002e-05 | 0.500001
    8.002e-05 | 0.500001
    0.00016002 | 0.500001
    0.00032002 | 0.500001
    0.00064002 | 0.500003
    0.00128002 | 0.500005
    0.00256002 | 0.500009
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
Plots
  pg1: PlotGroup3D "Nanodot_u" | data = dset1
    slc1: Slice "切面 u1" | expr = u1; quickplane = xy; quickznumber = 1
    slc2: Slice "切面 u2" (disabled) | expr = u2; quickplane = xy; quickznumber = 1
    slc3: Slice "切面 u3" (disabled) | expr = u3; quickplane = xy; quickznumber = 1
    arwv1: ArrowVolume "体箭头 P" | expr = {P1 / P0_, P2 / P0_, P3 / P0_}; xnumber = 30; ynumber = 30; znumber = 1
  pg2: PlotGroup3D "Nanodot_V" | data = dset1
    slc1: Slice "切面 V" | expr = V; quickplane = xy; quickznumber = 1
    arwv1: ArrowVolume "体箭头 P" | expr = {P1 / P0_, P2 / P0_, P3 / P0_}; xnumber = 30; ynumber = 30; znumber = 1
  pg3: PlotGroup3D "Nanodot_P" | data = dset1
    slc1: Slice "切面 P1" | expr = P3 / P0_; quickplane = xy; quickznumber = 1
    slc2: Slice "切面 P2" (disabled) | expr = P2 / P0_; quickplane = xy; quickznumber = 1
    slc3: Slice "切面 P3" (disabled) | expr = P3 / P0_; quickplane = xy; quickznumber = 1
    arwv1: ArrowVolume "体箭头 P" | expr = {P1 / P0_, P2 / P0_, P3 / P0_}; xnumber = 30; ynumber = 30; znumber = 1
  pg11: PlotGroup3D "Nanodot_Energy" | data = dset1
    slc1: Slice "切面 Landau" | expr = F_Landau_; quickplane = xy; quickznumber = 1
    slc2: Slice "切面 Elastic" (disabled) | expr = F_Elastic_; quickplane = xy; quickznumber = 1
    slc3: Slice "切面 Electric" (disabled) | expr = F_Electric_; quickplane = xy; quickznumber = 1
    slc4: Slice "切面 GradPola" (disabled) | expr = F_GradPola_; quickplane = xy; quickznumber = 1
    arwv1: ArrowVolume "体箭头 P" | expr = {P1 / P0_, P2 / P0_, P3 / P0_}; xnumber = 30; ynumber = 30; znumber = 1
  pg4: PlotGroup3D "Bulk_u" | data = dset2
    slc1: Slice "切面 u1" | expr = u1; quickplane = xy; quickznumber = 1
    slc2: Slice "切面 u2" (disabled) | expr = u2; quickplane = xy; quickznumber = 1
    slc3: Slice "切面 u3" (disabled) | expr = u3; quickplane = xy; quickznumber = 1
    arwv1: ArrowVolume "体箭头 P" | expr = {P1 / P0_, P2 / P0_, P3 / P0_}; xnumber = 30; ynumber = 30; znumber = 1
  pg5: PlotGroup3D "Bulk_V" | data = dset2
    slc1: Slice "切面 V" | expr = V; quickplane = xy; quickznumber = 1
    arwv1: ArrowVolume "体箭头 P" | expr = {P1 / P0_, P2 / P0_, P3 / P0_}; xnumber = 30; ynumber = 30; znumber = 1
  pg6: PlotGroup3D "Bulk_P" | data = dset2
    slc1: Slice "切面 P1" | expr = P1/ P0_; quickplane = xy; quickznumber = 1
    slc2: Slice "切面 P2" (disabled) | expr = P2 / P0_; quickplane = xy; quickznumber = 1
    slc3: Slice "切面 P3" (disabled) | expr = P3 / P0_; quickplane = xy; quickznumber = 1
    arwv1: ArrowVolume "体箭头 P" | expr = {P1 / P0_, P2 / P0_, P3 / P0_}; xnumber = 30; ynumber = 30; znumber = 1
  pg12: PlotGroup3D "Bulk_Energy" | data = dset2
    slc1: Slice "切面 Landau" | expr = F_Landau_; quickplane = xy; quickznumber = 1
    slc2: Slice "切面 Elastic" (disabled) | expr = F_Elastic_; quickplane = xy; quickznumber = 1
    slc3: Slice "切面 Electric" (disabled) | expr = F_Electric_; quickplane = xy; quickznumber = 1
    slc4: Slice "切面 GradPola" (disabled) | expr = F_GradPola_; quickplane = xy; quickznumber = 1
    arwv1: ArrowVolume "体箭头 P" | expr = {P1 / P0_, P2 / P0_, P3 / P0_}; xnumber = 30; ynumber = 30; znumber = 1
  pg7: PlotGroup3D "ElecApplied_u" | data = dset3
    slc1: Slice "切面 u1" | expr = u1; quickplane = xy; quickznumber = 1
    slc2: Slice "切面 u2" (disabled) | expr = u2; quickplane = xy; quickznumber = 1
    slc3: Slice "切面 u3" (disabled) | expr = u3; quickplane = xy; quickznumber = 1
    arwv1: ArrowVolume "体箭头 P" | expr = {P1 / P0_, P2 / P0_, P3 / P0_}; xnumber = 30; ynumber = 30; znumber = 1
  pg8: PlotGroup3D "ElecApplied_V" | data = dset3
    slc1: Slice "切面 V" | expr = V; quickplane = xy; quickznumber = 1
    arwv1: ArrowVolume "体箭头 P" | expr = {P1 / P0_, P2 / P0_, P3 / P0_}; xnumber = 30; ynumber = 30; znumber = 1
  pg9: PlotGroup3D "ElecApplied_P" | data = dset3
    slc1: Slice "切面 P1" | expr = P1 / P0_; quickplane = xy; quickznumber = 1
    slc2: Slice "切面 P2" (disabled) | expr = P2 / P0_; quickplane = xy; quickznumber = 1
    slc3: Slice "切面 P3" (disabled) | expr = P3 / P0_; quickplane = xy; quickznumber = 1
    arwv1: ArrowVolume "体箭头 P" | expr = {P1 / P0_, P2 / P0_, P3 / P0_}; xnumber = 30; ynumber = 30; znumber = 1
  pg13: PlotGroup3D "ElecApplied_Energy" | data = dset3
    slc1: Slice "切面 Landau" | expr = F_Landau_; quickplane = xy; quickznumber = 1
    slc2: Slice "切面 Elastic" (disabled) | expr = F_Elastic_; quickplane = xy; quickznumber = 1
    slc3: Slice "切面 Electric" (disabled) | expr = F_Electric_; quickplane = xy; quickznumber = 1
    slc4: Slice "切面 GradPola" (disabled) | expr = F_GradPola_; quickplane = xy; quickznumber = 1
    arwv1: ArrowVolume "体箭头 P" | expr = {P1 / P0_, P2 / P0_, P3 / P0_}; xnumber = 30; ynumber = 30; znumber = 1
  pg10: PlotGroup1D "探针绘图组 10"
    tblp1: Table "探针表图 1" | table = tbl1